// COMSOL Multiphysics 6.0.0.318 model "GaAs_L.mph"
// Opt temp
// Opt mech coupl\n\nUntitled\n\n
// Outline of the model tree

Parameters
  a = 1.128e-06
  t = 2.1e-07
  la_l = 9.1706e-07
  la_w = 3.8014e-07
  sa_l = 7.0613e-07
  sa_w = 3.8014e-07
  k0 = 5570199.7404
  nGaAs = 3.37
  p11 = -0.165
  p12 = -0.14
  p44 = -0.072
  cxo = 0
  cyo = 0
  cxm = 0
  cym = 0
  PML_t = 1e-6
  l0o = 1.56e-06
  v0o = c_const/l0o
  v0m = 1000000000
  Dlo = 25[nm]
  l1 = l0o+Dlo
  l2 = l0o-Dlo
  Nf = 150
  f1 = c_const/l1
  f2 = c_const/l2
  circ = 1

Variables
  var1 "Variables 1"
    Dmax = maxop1(abs(solid.disp))
    Vm = intop1((abs(solid.disp)/Dmax)^2)
    meff = 7850[kg/m^3]*Vm
    xzpf = (hbar_const/(4*pi*meff*solid.freq))^0.5
    gMB = -xzpf*200e12[Hz]*intop3(bintGaAs)
    gPE = (xzpf*200e12[Hz]*epsilon0_const*nGaAs^4*intop1(Itot)/((N_E1+N_E2)*maxop1(abs(solid.disp))))/2
  var2 "Variables 2"
    Epar = (nGaAs^2-1)*epsilon0_const*abs(ewfd.tEx^2+ewfd.tEy^2+ewfd.tEz^2)/(N_E1+N_E2)
    Dper = (1/nGaAs^2-1)/epsilon0_const*abs((ewfd.Dx*nx)^2+(ewfd.Dy*ny)^2+(ewfd.Dz*nz)^2)/(N_E1+N_E2)
    bintGaAs = (Qx*nx+Qy*ny+Qz*nz)*(Epar-Dper)
    Qx = u/Dmax
    Qy = v/Dmax
    Qz = w/Dmax
    N_E1 = intop1(nGaAs^2*epsilon0_const*ewfd.normE^2)
    N_E2 = intop2(1^2*epsilon0_const*ewfd.normE^2)
    I1 = 2*(real(conj(Ex)*Ey))*p44*solid.eXY
    I2 = 2*(real(conj(Ex)*Ez))*p44*solid.eXZ
    I3 = 2*(real(conj(Ey)*Ez))*p44*solid.eYZ
    I4 = abs(Ex)^2*(p11*solid.eX+p12*(solid.eY+solid.eZ))
    I5 = abs(Ey)^2*(p11*solid.eY+p12*(solid.eX+solid.eZ))
    I6 = abs(Ez)^2*(p11*solid.eZ+p12*(solid.eX+solid.eY))
    Itot = I1+I2+I3+I4+I5+I6

Selections
  ewfd_dst_pc1: Explicit "Destination selection for 'Periodic Condition 1'" on no domains
  ewfd_dst_pc2: Explicit "Destination selection for 'Periodic Condition 2'" on no domains
  solid_dst_pc1: Explicit "Destination selection for 'Periodic Condition 1' 1" on no domains
  solid_dst_pc2: Explicit "Destination selection for 'Periodic Condition 2' 1" on no domains

Couplings
  intop1: Integration on domains 3
  intop2: Integration on domains 1, 2, 4
  intop3: Integration on boundaries 7-12, 19, 20, 22-29, 32, 33
  maxop1: Maximum on domains 3

Coordinate systems
  pml1: PML "Perfectly Matched Layer 1" on domains 1, 4

Geometry
  geom1 "Geometry 1" (3D, length unit m)
    blk1: Block | base = center; size = {a, a, t}
    blk2: Block | pos = {-sa_l/2+la_w/2, 0, 0}; base = center; size = {la_w, la_l, t}
    blk3: Block | pos = {0, -la_l/2+sa_w/2, 0}; base = center; size = {sa_l, sa_w, t}
    dif1: Difference | input = blk1; input2 = blk2
    dif2: Difference | input = dif1; input2 = blk3
    blk4: Block | base = center; size = {a, a, 8e-6}; layername = Layer 1; layer = PML_t; layertop = on
    fin: Finalize "Form Union"

Materials
  mat2: Common "Air" on domains 1, 2, 4
    RefractiveIndex
      n = 1
      ki = 0
  mat3: Common "GaAs" on domains 3
    RefractiveIndex
      n = 3.37
      ki = 0

Physics
  ewfd: ElectromagneticWavesFrequencyDomain on all domains
    dependent variable E = {Ex, Ey, Ez}
    wee1: WaveEquationElectric (default)
    pec1: PerfectElectricConductor (default)
    init1: init "Initial Values 1" (default)
    pc1: PeriodicCondition on boundaries 1, 4, 7, 10, 13, 30-34
      PeriodicType = Floquet
      Floquet_source = FromPeriodicPort
      kFloquet = {cxo*k0, cyo*k0, 0}
      destinationDomains: boundaries 30-34
    pc2: PeriodicCondition on boundaries 2, 5, 8, 11, 14, 17-21
      PeriodicType = Floquet
      Floquet_source = FromPeriodicPort
      kFloquet = {cxo*k0, cyo*k0, 0}
      destinationDomains: boundaries 17-21
    sctr1: Scattering "Scattering Boundary Condition 1" on boundaries 3, 16
    port1: Port on boundaries 15
      PortSlit = 1
      SlitType = DomainBacked
      PortOrientation = ForwardPort
      PortType = Periodic
      Eampl = {1, circ*j, 0}
    port2: Port on boundaries 6
      PortSlit = 1
      SlitType = DomainBacked
      PortOrientation = ReversePort
      PortType = Periodic
      Eampl = {1, j, 0}
    port3: Port on boundaries 6
      PortSlit = 1
      SlitType = DomainBacked
      PortOrientation = ReversePort
      PortType = Periodic
      Eampl = {1, -j, 0}

Mesh
  mesh1 "Mesh 1"
    size: MeshSizeDefault | hauto = 3
    ftri1: FreeTri "Free Triangular 1" on boundaries 7, 8
      size1: Size on boundaries 7, 8 | hmax = 5e-8; custom = on
    cpf1: CopyFace | source = boundaries 7; destination = boundaries 32
    cpf2: CopyFace | source = boundaries 8; destination = boundaries 19
    ftet1: FreeTet "Free Tetrahedral 1" on domains 3
      size1: Size on domains 3 | hgrad = 1; hauto = 1; custom = on
    ftri2: FreeTri "Free Triangular 2" on boundaries 4, 5, 10, 11
      size1: Size on boundaries 4, 5, 10, 11 | hmax = 2E-7; hauto = 3; custom = on; hgrad = 1.1
    cpf3: CopyFace | source = boundaries 4, 10; destination = boundaries 31, 33
    cpf4: CopyFace | source = boundaries 5, 11; destination = boundaries 18, 20
    ftet2: FreeTet "Free Tetrahedral 2" on domains 2
    swe1: Sweep "Swept 1" on domains 1, 4
      dis1: Distribution on domains 1, 4

Studies
  std1 "Study 1"
    param: Parametric "Parametric Sweep" | pname = circ; plistarr = -1,1
    freq: Frequency "Frequency Domain" | punit = THz; plist = range(f1,(f2-(f1))/(Nf-1),f2)

Solver configurations
  sol1 "Solution 1" (study std1)
    v1: Variables "Dependent Variables 1"
    s1: Stationary "Stationary Solver 1" | stol = 0.01
      p1: Parametric | pname = freq; plistarr = range(f1,(f2-(f1))/(Nf-1),f2); punit = THz; pcontinuationmode = no
      fc1: FullyCoupled | linsolver = d1
      d1: Direct "Suggested Direct Solver (ewfd)"
  sol54 "Parametric Solutions 2" (study std1)

Datasets
  dset1: Solution | solution = sol1
  dset2: Solution | solution = sol54

Derived values
  gev1: EvalGlobal "Reflectance, Transmittance, and Absorptance (ewfd)"
    data = dset1
    table = new
    expr = {ewfd.Rorder_0_0, ewfd.Rtotal, ewfd.Torder_0_0, ewfd.Ttotal, ewfd.RTtotal, ewfd.Atotal}
  gev2: EvalGlobal "Global Evaluation 2"
    data = dset2
    table = tbl3
    expr = {c_const/freq, ewfd.Ttotal}
    unit = {m, 1}
    descr = {, Total transmittance}

Tables
  tbl2: Table
    // Global Evaluation 2
    circ | freq (THz) | c_const/freq (m) | Total transmittance (1)
    -1 | 189.742 | 1.58e-06 | 0.235172
    -1 | 189.792 | 1.57959e-06 | 0.249798
    -1 | 189.841 | 1.57917e-06 | 0.266114
    -1 | 189.891 | 1.57876e-06 | 0.284014
    -1 | 189.941 | 1.57835e-06 | 0.30337
    -1 | 189.99 | 1.57794e-06 | 0.324036
    -1 | 190.04 | 1.57752e-06 | 0.345858
    -1 | 190.09 | 1.57711e-06 | 0.368679
    -1 | 190.139 | 1.5767e-06 | 0.392349
    -1 | 190.189 | 1.57629e-06 | 0.416727
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  tbl3: Table
    // Global Evaluation 2
    circ | freq (THz) | c_const/freq (m) | Total transmittance (1)
    -1 | 189.144 | 1.585e-06 | 0.192601
    -1 | 189.185 | 1.58465e-06 | 0.189024
    -1 | 189.226 | 1.58431e-06 | 0.186134
    -1 | 189.268 | 1.58396e-06 | 0.184006
    -1 | 189.309 | 1.58362e-06 | 0.182718
    -1 | 189.35 | 1.58327e-06 | 0.182343
    -1 | 189.392 | 1.58292e-06 | 0.182956
    -1 | 189.433 | 1.58258e-06 | 0.184624
    -1 | 189.474 | 1.58223e-06 | 0.187409
    -1 | 189.516 | 1.58189e-06 | 0.191366
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
Plots
  pg3: PlotGroup1D "1D Plot Group 3" | data = dset2
    glob1: Global | expr = ewfd.Ttotal; unit = 1; descr = Total transmittance
  pg4: PlotGroup3D "Electric Field (ewfd)" | data = dset1
    mslc1: Multislice | expr = ewfd.normE
  pg5: PlotGroup1D "Polarization Plot (ewfd)" | data = dset1; title = Polarization states, Color: Phase (Radians)
    plz1: Polarization | legends = Reflection
      col1: Color "Color Expression 1" | expr = phase
    plz2: Polarization | legends = Transmission
      col1: Color "Color Expression 1" | expr = phase
  pg6: PlotGroup3D "Electric Field (ewfd) 1" | data = dset2
    mslc1: Multislice | expr = ewfd.normE
  pg7: PlotGroup1D "Reflectance, Transmittance, and Absorptance (ewfd)"
    data = dset2
    ylabel = Reflectance, transmittance, and absorptance (1)
    glob1: Global
      expr = {ewfd.Rorder_0_0, ewfd.Torder_0_0, ewfd.Torder_0_0, ewfd.Ttotal, ewfd.RTtotal, ewfd.Atotal}
      unit = {1, 1, 1, 1, 1, 1}
      descr = {"Reflectance, order [0,0]", "Transmittance, order [0,0]", "Transmittance, order [0,0]", Total transmittance, Total reflectance and transmittance, Absorptance}
      xdata = expr
      xdataexpr = freq
  pg8: PlotGroup1D "Polarization Plot (ewfd) 1" | data = dset2; title = Polarization states, Color: Phase (Radians)
    plz1: Polarization | legends = Reflection
      col1: Color "Color Expression 1" | expr = phase
    plz2: Polarization | legends = Transmission
      col1: Color "Color Expression 1" | expr = phase
  pg9: PlotGroup1D "1D Plot Group 9" | data = none
    tblp1: Table "Table Graph 1" | table = tbl3; xaxisdata = 3; plotcolumninput = manual; plotcolumns = 4