// COMSOL Multiphysics 6.0.0.318 model "test.mph"
// Frequency Selective Surface, Periodic Complementary Split Ring Resonator
// Frequency selective surfaces (FSS) are periodic structures with a bandpass or a bandstop frequency response. This example shows that only signals around the center frequency can pass through the periodic complimentary split ring resonator layer.
// Outline of the model tree

Parameters
  theta = 0[deg]  // Elevation angle
  a = 0.930[um]
  d = 0.569[um]
  t_a = 3
  t_pml = 0.5
  lt = 221[nm]
  dt = 265[nm]
  the1 = 120[deg]
  the2 = 96.5[deg]
  d1 = 70[nm]
  d2 = 50[nm]
  l0 = 1555[nm]
  Dl = 5[nm]
  li = l0-Dl
  lf = l0+Dl
  fi = c_const/lf
  ff = c_const/li
  Nf = 30
  eo = 2.13^2
  ee_old = 2.21^2
  ee = 3^2
  circ = 1

Selections
  sel1: Explicit "Port 1" on boundaries 16
  sel2: Explicit "Port 2" on boundaries 3
  sel3: Explicit on no domains

Coordinate systems
  pml1: PML "Perfectly Matched Layer 1" on domains 4
    wavelengthSourceType = userDefined
    typicalWavelength = 2*pi/abs(ewfd.k0*cos(theta))
  pml2: PML "Perfectly Matched Layer 2" on domains 1
    wavelengthSourceType = userDefined
    typicalWavelength = 2*pi/abs(ewfd.k0*cos(theta))
  sys2: Rotated "Rotated System 2" | angle = {pi/2, pi/2, pi/2}

Geometry
  geom1 "Geometry 1" (3D, length unit µm)
    blk1: Block | base = center; size = {a, a, d+2*(t_a+t_pml)}; layername = {Layer 1, Layer 2}; layer = {t_pml, 2*t_a+d}
    wp1: WorkPlane | quickz = -d/2; unite = on
      r1: Rectangle | base = center; size = {a, a}
      pol1: Polygon
        source = table
        table = {{-lt/2-d2, lt*sqrt(3)/4+d1}, {lt/2-d2, lt*sqrt(3)/4+d1}, {0-d2, -lt*sqrt(3)/4+d1}}
      mov1: Move | input = pol1; displx = dt*cos(the2-90[deg]); disply = dt*sin(the2-90[deg])
      pol2: Polygon
        source = table
        table = {{-lt/2-d2, lt*sqrt(3)/4+d1}, {lt/2-d2, lt*sqrt(3)/4+d1}, {0-d2, -lt*sqrt(3)/4+d1}}
      mov2: Move | input = pol2; displx = dt*cos(the1+(the2-90[deg])); disply = dt*sin(the1+(the2-90[deg]))
      pol3: Polygon
        source = table
        table = {{-lt/2-d2, lt*sqrt(3)/4+d1}, {lt/2-d2, lt*sqrt(3)/4+d1}, {0-d2, -lt*sqrt(3)/4+d1}}
      mov3: Move | input = pol3; displx = d2-lt/2; disply = -d1-lt*sqrt(3)/4
      dif2: Difference | input = r1; input2 = mov1, mov2, mov3
    ext1: Extrude | workplane = wp1; input = wp1; distance = d
    fin: Finalize "Form Union"

Materials
  mat1: Common "Air" on all domains
    def "Basic"
      thermalexpansioncoefficient = alpha_p(pA,T)
      molarmass = 0.02897[kg/mol]
      bulkviscosity = muB(T)
      relpermeability = 1
      relpermittivity = 1
      dynamicviscosity = eta(T)
      ratioofspecificheat = 1.4
      electricconductivity = 0[S/m]
      heatcapacity = Cp(T)
      density = rho(pA,T)
      thermalconductivity = k(T)
      soundspeed = cs(T)
      eta: Piecewise | arg = T; pieces = {200.0, 1600.0, -8.38278E-7+8.35717342E-8*T^1-7.69429583E-11*T^2+4.6437266E-14*T^3-1.06585607E-17*T^4}; argunit = K; fununit = Pa*s
      Cp: Piecewise | arg = T; pieces = {200.0, 1600.0, 1047.63657-0.372589265*T^1+9.45304214E-4*T^2-6.02409443E-7*T^3+1.2858961E-10*T^4}; argunit = K; fununit = J/(kg*K)
      rho: Analytic | expr = pA*0.02897/R_const[K*mol/J]/T; args = {pA, T}; fununit = kg/m^3; argunit = {Pa, K}
      k: Piecewise | arg = T; pieces = {200.0, 1600.0, -0.00227583562+1.15480022E-4*T^1-7.90252856E-8*T^2+4.11702505E-11*T^3-7.43864331E-15*T^4}; argunit = K; fununit = W/(m*K)
      cs: Analytic | expr = sqrt(1.4*R_const[K*mol/J]/0.02897*T); args = T; fununit = m/s; argunit = K
      an1: Analytic | funcname = alpha_p; expr = -1/rho(pA,T)*d(rho(pA,T),T); args = {pA, T}; fununit = 1/K; argunit = {Pa, K}
      an2: Analytic "Analytic 2a" | funcname = muB; expr = 0.6*eta(T); args = T; fununit = Pa*s; argunit = K
    RefractiveIndex
      n = 1
      ki = 0
    NonlinearModel
      BA = (def.gamma+1)/2
    idealGas
      Rs = R_const/Mn
      heatcapacity = Cp(T)
      ratioofspecificheat = 1.4
      molarmass = 0.02897
      Cp: Piecewise | arg = T; pieces = {200.0, 1600.0, 1047.63657-0.372589265*T^1+9.45304214E-4*T^2-6.02409443E-7*T^3+1.2858961E-10*T^4}; argunit = K; fununit = J/(kg*K)
  mat2: Common "LiNbO3" on domains 3
    def "Basic"
      relpermittivity = diag{eo, eo, ee}
      relpermeability = 1
      electricconductivity = 0

Physics
  ewfd: ElectromagneticWavesFrequencyDomain on all domains
    dependent variable E = {Ex, Ey, Ez}
    wee1: WaveEquationElectric (default) | DisplacementFieldModel = RelativePermittivity; coordinateSystem = sys2
    pec1: PerfectElectricConductor (default)
    init1: init "Initial Values 1" (default)
    pc1: PeriodicCondition on boundaries 8, 19
      PeriodicType = Floquet
      Floquet_source = FromPeriodicPort
      destinationDomains: boundaries 19
    pc2: PeriodicCondition on boundaries 7, 33
      PeriodicType = Floquet
      Floquet_source = FromPeriodicPort
      destinationDomains: boundaries 33
    pc3: PeriodicCondition on boundaries 2, 5, 11, 14, 17, 18, 20, 21
      PeriodicType = Floquet
      Floquet_source = FromPeriodicPort
      destinationDomains: boundaries 17, 18, 20, 21
    pc4: PeriodicCondition on boundaries 1, 4, 10, 13, 31, 32, 34, 35
      PeriodicType = Floquet
      Floquet_source = FromPeriodicPort
      destinationDomains: boundaries 31, 32, 34, 35
    port1: Port on boundaries 15
      PortSlit = 1
      SlitType = DomainBacked
      PortOrientation = ForwardPort
      PortType = Periodic
      InputType = E
      Eampl = {1, -j, 0}
      Hampl = {1, 0, 0}
      alpha1_inc = 0
    port2: Port on boundaries 6 | PortSlit = 1; SlitType = DomainBacked; PortType = Periodic; Eampl = {1, j, 0}
    port3: Port on boundaries 6 | PortSlit = 1; SlitType = DomainBacked; PortType = Periodic; Eampl = {1, -j, 0}

Mesh
  mesh1 "Mesh 1"
    size: MeshSizeDefault | hmax = 11.100; hmin = 0.016000; hcurve = 0.2; hgrad = 1.3; hauto = 1; custom = on
    ftri4: FreeTri "Free Triangular 4" on boundaries 4, 10
      size1: Size on boundaries 4, 10 | hgrad = 1.45; hauto = 4
    cpf1: CopyFace | source = boundaries 4, 10; destination = boundaries 32, 34
    ftri5: FreeTri "Free Triangular 5" on boundaries 5, 11
      size1: Size on boundaries 5, 11 | hgrad = 1.02; custom = on
    cpf2: CopyFace | source = boundaries 5, 11; destination = boundaries 18, 20
    ftri3: FreeTri "Free Triangular 3" on boundaries 12
      size1: Size on boundaries 12 | hmax = 0.05; hauto = 1; custom = on
    swe1: Sweep "Swept 1" on domains 3
      dis1: Distribution on domains 3 | numelem = 10
    ftet1: FreeTet "Free Tetrahedral 1" on domains 2
    swe2: Sweep "Swept 2" on remaining entities
      dis1: Distribution on all domains

Studies
  std1 "Study 1"
    freq: Frequency "Frequency Domain" | punit = THz; plist = range(fi,(ff-(fi))/(Nf-1),ff)

Solver configurations
  sol1 "Solution 1" (study std1)
    v1: Variables "Dependent Variables 1"
    s1: Stationary "Stationary Solver 1" | stol = 0.01
      p1: Parametric | pname = freq; plistarr = range(fi,(ff-(fi))/(Nf-1),ff); punit = THz; pcontinuationmode = no
      fc1: FullyCoupled | linsolver = d1
      d1: Direct "Suggested Direct Solver (ewfd)"

Datasets
  dset1: Solution | solution = sol1

Derived values
  gev1: EvalGlobal "Global Evaluation 1"
    data = dset1
    table = tbl2
    expr = {c_const/freq, ewfd.Tport_2, ewfd.Tport_3}
    descr = {, "Transmittance, port 2", "Transmittance, port 3"}

Tables
  tbl1: Table
    // Global Evaluation 1
    freq (THz) | c_const/freq (µm) | Transmittance, port 2 (1) | Transmittance, port 3 (1)
    190.344 | 1.575 | 0.479768 | 0.261716
    190.56 | 1.57322 | 0.466022 | 0.262288
    190.775 | 1.57145 | 0.401349 | 0.275219
    190.99 | 1.56968 | 0.592803 | 0.214533
    191.205 | 1.56791 | 0.527262 | 0.233654
    191.42 | 1.56615 | 0.510858 | 0.235503
    191.636 | 1.56439 | 0.500279 | 0.23539
    191.851 | 1.56263 | 0.489402 | 0.235255
    192.066 | 1.56088 | 0.474188 | 0.236217
    192.281 | 1.55914 | 0.446305 | 0.24027
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  tbl2: Table
    // Global Evaluation 1
    freq (THz) | c_const/freq (µm) | Transmittance, port 2 (1) | Transmittance, port 3 (1)
    192.175 | 1.56 | 0.234686 | 0.46111
    192.217 | 1.55965 | 0.235545 | 0.454972
    192.26 | 1.55931 | 0.236637 | 0.447756
    192.303 | 1.55896 | 0.23802 | 0.439132
    192.346 | 1.55861 | 0.239776 | 0.428625
    192.388 | 1.55827 | 0.242009 | 0.415537
    192.431 | 1.55792 | 0.244859 | 0.398792
    192.474 | 1.55757 | 0.248484 | 0.376683
    192.517 | 1.55723 | 0.252991 | 0.346399
    192.559 | 1.55688 | 0.258021 | 0.303366
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
Plots
  pg1: PlotGroup3D "Electric Field (ewfd)" | data = dset1
    mslc1: Multislice | expr = ewfd.normE
  pg2: PlotGroup1D "Transm" | data = dset1; ylabel = Reflectance, transmittance, and absorptance (1)
    glob1: Global
      expr = {ewfd.Tport_2, ewfd.Tport_3}
      unit = {1, 1}
      descr = {"Transmittance, port 2", "Transmittance, port 3"}
      xdata = expr
      xdataexpr = c_const/freq
    tblp1: Table "Table Graph 1" | table = tbl2; xaxisdata = 2; plotcolumninput = manual; plotcolumns = {3, 4}
  pg3: PlotGroup1D "Polarization Plot (ewfd)" | data = dset1; title = Polarization states, Color: Phase (Radians)
    plz1: Polarization | display = 0; legends = Reflection
      col1: Color "Color Expression 1" | expr = phase
    plz2: Polarization | display = 1; legends = Transmission
      col1: Color "Color Expression 1" | expr = phase